OpenVSP model (file version 5), 6 components.
Geometry view with OpenVSP parameter names; values to 6 digits, angles in degrees, lengths in the model's unit.
Overall bounding box: X_Min=0 X_Len=0.5 Y_Min=-0.05 Y_Len=0.1 Z_Min=-0.05 Z_Len=0.100576

Fuselage "Nose"
  location (X Y Z) 0 0 0, rotation 0 0 0
  bounding box size 0.1 0.1 0.1
  Design: Length=0.1
  cross sections:
    n  XLocPercent  YLocPercent  ZLocPercent  shape
    0  0            0            0            point
    1  0            0            0            circle Circle_Diameter=0.06
    2  0.06         0            0            circle Circle_Diameter=0.085
    3  0.5          0            0            rounded rectangle RoundRectXSec_Radius=0.01 RoundedRect_Height=0.1 RoundedRect_Width=0.1
    4  1            0            0            as above
    5  1            0            0            point

Fuselage "Midbody"
  location (X Y Z) 0.05 0 0, rotation 0 0 0
  bounding box size 0.1 0.1 0.1
  Design: Length=0.1
  cross sections:
    n  XLocPercent  YLocPercent  ZLocPercent  shape
    0  0            0            0            rounded rectangle RoundRectXSec_Radius=0.01 RoundedRect_Height=0.1 RoundedRect_Width=0.1
    1  1            0            0            as above

Fuselage "Tail"
  location (X Y Z) 0.15 0 0, rotation 0 0 0
  bounding box size 0.1 0.1 0.100085
  Design: Length=0.1
  cross sections:
    n  XLocPercent  YLocPercent  ZLocPercent  shape
    0  0            0            0            point
    1  0            0            0            rounded rectangle RoundRectXSec_Radius=0.01 RoundedRect_Height=0.1 RoundedRect_Width=0.1
    2  1            0            0.2          rounded rectangle RoundRectXSec_Radius=0.01 RoundedRect_Height=0.06 RoundedRect_Width=0.03
    3  1            0            0.2          point

Fuselage "FuselageGeom"
  location (X Y Z) 0 0 0, rotation 0 0 0
  bounding box size 0.5 0.1 0.100576
  Design: Length=0.5
  cross sections:
    n  XLocPercent  YLocPercent  ZLocPercent  shape
    0  0            0            0            circle Circle_Diameter=0.06
    1  0.07         0            0            rounded rectangle RoundRectXSec_Radius=0.01 RoundedRect_Height=0.1 RoundedRect_Width=0.1
    2  0.8          0            0            as above
    3  1            0            0.04         rounded rectangle RoundRectXSec_Radius=0.01 RoundedRect_Height=0.05 RoundedRect_Width=0.035

Mesh "Nose Mesh"
  location (X Y Z) 0 0 0, rotation 0 0 0
  triangle mesh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

Mesh "Tail Mesh"
  location (X Y Z) 0 0 0, rotation 0 0 0
  triangle mesh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
